<?xml version="1.0" encoding="UTF-8"?>
<neuroml xmlns="http://morphml.org/neuroml/schema"
    xmlns:mml="http://morphml.org/morphml/schema"
    xmlns:meta="http://morphml.org/metadata/schema"
    xmlns:bio="http://morphml.org/biophysics/schema"
    xmlns:cml="http://morphml.org/channelml/schema"
    xmlns:xsi="http://www.w3.org/2001/XMLSchema-instance"
    xsi:schemaLocation="http://morphml.org/neuroml/schema http://www.neuroml.org/NeuroMLValidator/NeuroMLFiles/Schemata/v1.8.1/Level3/NeuroML_Level3_v1.8.1.xsd"
    name = "NeuroML Level 2 file exported from NEURON"
    lengthUnits="micron">

<meta:notes>NeuroML Level 2 file generated from ModelView by: NEURON -- Release 7.3 (849:5be3d097b917) 2013-04-11
Authors: Michael Hines, Sushil Kambampati and Padraig Gleeson,
Yale University and UCL</meta:notes>

<cells>
  <cell name="PCell5_0">
    <meta:notes>Cell: PCell5_0 exported from NEURON ModelView</meta:notes>
    <segments  xmlns="http://morphml.org/morphml/schema"> <!-- Changing the namespace from neuroml to morphml-->
<!-- Section: PCell5[0].soma -->
      <segment id="0" name = "Seg0_soma" cable = "0">
        <proximal x="0" y="0" z="0" diameter="20"/>
        <distal x="10" y="0" z="0" diameter="20"/>
      </segment>
      <segment id="2" name = "Seg1_soma" parent="0" cable = "0">
        <distal x="20" y="0" z="0" diameter="20"/>
      </segment>
<!-- Section: PCell5[0].Bdend -->
      <segment id="9" name = "Seg0_Bdend" parent="0" cable = "4">  <!-- Connected at 0 on parent section: PCell5[0].soma  -->
        <proximal x="0" y="0" z="0" diameter="2"/>
        <distal x="-100" y="8.74228e-06" z="0" diameter="2"/>
      </segment>
      <segment id="10" name = "Seg1_Bdend" parent="9" cable = "4">
        <distal x="-200" y="1.74846e-05" z="0" diameter="2"/>
      </segment>
<!-- Section: PCell5[0].Adend[0] -->
      <segment id="3" name = "Seg0_Adend_0" parent="2" cable = "1">  <!-- Parent section: PCell5[0].soma -->
        <proximal x="20" y="0" z="0" diameter="2"/>
        <distal x="95" y="0" z="0" diameter="2"/>
      </segment>
      <segment id="4" name = "Seg1_Adend_0" parent="3" cable = "1">
        <distal x="170" y="0" z="0" diameter="2"/>
      </segment>
<!-- Section: PCell5[0].Adend[1] -->
      <segment id="5" name = "Seg0_Adend_1" parent="4" cable = "2">  <!-- Parent section: PCell5[0].Adend[0] -->
        <proximal x="170" y="0" z="0" diameter="2"/>
        <distal x="245" y="0" z="0" diameter="2"/>
      </segment>
      <segment id="6" name = "Seg1_Adend_1" parent="5" cable = "2">
        <distal x="320" y="0" z="0" diameter="2"/>
      </segment>
<!-- Section: PCell5[0].Adend[2] -->
      <segment id="7" name = "Seg0_Adend_2" parent="6" cable = "3">  <!-- Parent section: PCell5[0].Adend[1] -->
        <proximal x="320" y="0" z="0" diameter="2"/>
        <distal x="395" y="0" z="0" diameter="2"/>
      </segment>
      <segment id="8" name = "Seg1_Adend_2" parent="7" cable = "3">
        <distal x="470" y="0" z="0" diameter="2"/>
      </segment>
    </segments>
    <cables  xmlns="http://morphml.org/morphml/schema"> <!-- Changing namespace from neuroml to morphml-->
      <cable id = "0" name = "soma" fract_along_parent = "0"/>
      <cable id = "4" name = "Bdend" fract_along_parent = "0"/>
      <cable id = "1" name = "Adend_0"/>
      <cable id = "2" name = "Adend_1"/>
      <cable id = "3" name = "Adend_2"/>
      <cablegroup name="all"> <!-- Replacing subset name ModelViewParmSubset_12 with all, as it contains all sections -->
        <cable id = "0"/>
        <cable id = "4"/>
        <cable id = "1"/>
        <cable id = "2"/>
        <cable id = "3"/>
      </cablegroup>
      <cablegroup name="ModelViewParmSubset_13">
        <cable id = "4"/>
        <cable id = "1"/>
        <cable id = "2"/>
        <cable id = "3"/>
      </cablegroup>
      <cablegroup name="ModelViewParmSubset_14">
        <cable id = "2"/>
        <cable id = "3"/>
      </cablegroup>
      <cablegroup name="ModelViewParmSubset_15">
        <cable id = "0"/>
        <cable id = "4"/>
        <cable id = "1"/>
      </cablegroup>
      <cablegroup name="ModelViewParmSubset_16">
        <cable id = "4"/>
        <cable id = "1"/>
      </cablegroup>
      <cablegroup name="OneSecGrp_SectionRef_2"> <!-- Creating a group containing a single section: PCell5[0].Bdend... -->
        <cable id = "4"/>
      </cablegroup>
      <cablegroup name="OneSecGrp_SectionRef_3"> <!-- Creating a group containing a single section: PCell5[0].Adend[0]... -->
        <cable id = "1"/>
      </cablegroup>
      <cablegroup name="OneSecGrp_SectionRef_1"> <!-- Creating a group containing a single section: PCell5[0].soma... -->
        <cable id = "0"/>
      </cablegroup>
      <cablegroup name="OneSecGrp_SectionRef_4"> <!-- Creating a group containing a single section: PCell5[0].Adend[1]... -->
        <cable id = "2"/>
      </cablegroup>
      <cablegroup name="OneSecGrp_SectionRef_5"> <!-- Creating a group containing a single section: PCell5[0].Adend[2]... -->
        <cable id = "3"/>
      </cablegroup>
    </cables>
    <biophysics  units = "Physiological Units"> <!-- Note: values of cond dens are different in NEURON and phy units-->
      <bio:mechanism name="pas" type="Channel Mechanism" passive_conductance="true">
        <bio:parameter name="gmax" value="0.0357143">
          <bio:group>all</bio:group>
        </bio:parameter>
        <bio:parameter name="e" value="-92.8179">
          <bio:group>OneSecGrp_SectionRef_2</bio:group>
        </bio:parameter>
        <bio:parameter name="e" value="-91.4552">
          <bio:group>OneSecGrp_SectionRef_3</bio:group>
        </bio:parameter>
        <bio:parameter name="e" value="-66.0387">
          <bio:group>OneSecGrp_SectionRef_1</bio:group>
        </bio:parameter>
        <bio:parameter name="e" value="-50.0339">
          <bio:group>OneSecGrp_SectionRef_4</bio:group>
        </bio:parameter>
        <bio:parameter name="e" value="-49.136">
          <bio:group>OneSecGrp_SectionRef_5</bio:group>
        </bio:parameter>
      </bio:mechanism>
      <bio:mechanism name="cad" type="Channel Mechanism">
      </bio:mechanism>
      <bio:mechanism name="kmAHP" type="Channel Mechanism">
        <bio:parameter name="gkbar" value="0.001">
          <bio:group>all</bio:group>
        </bio:parameter>
      </bio:mechanism>
      <bio:mechanism name="carF" type="Channel Mechanism">
        <bio:parameter name="gcabar" value="0.03">
          <bio:group>all</bio:group>
        </bio:parameter>
        <bio:parameter name="eca" value="10">
          <bio:group>all</bio:group>
        </bio:parameter>
        <bio:parameter name="vha" value="-30">
          <bio:group>all</bio:group>
        </bio:parameter>
        <bio:parameter name="ka" value="-6.7">
          <bio:group>all</bio:group>
        </bio:parameter>
        <bio:parameter name="ta" value="3.6">
          <bio:group>all</bio:group>
        </bio:parameter>
        <bio:parameter name="vhi" value="-65">
          <bio:group>all</bio:group>
        </bio:parameter>
        <bio:parameter name="ki" value="11.8">
          <bio:group>all</bio:group>
        </bio:parameter>
        <bio:parameter name="ti" value="20">
          <bio:group>all</bio:group>
        </bio:parameter>
      </bio:mechanism>
      <bio:mechanism name="hd" type="Channel Mechanism">
        <bio:parameter name="ghdbar" value="5e-05">
          <bio:group>OneSecGrp_SectionRef_1</bio:group>
        </bio:parameter>
        <bio:parameter name="ghdbar" value="0.0001925">
          <bio:group>OneSecGrp_SectionRef_3</bio:group>
        </bio:parameter>
        <bio:parameter name="ghdbar" value="0.0002">
          <bio:group>OneSecGrp_SectionRef_2</bio:group>
        </bio:parameter>
        <bio:parameter name="ghdbar" value="0.0004175">
          <bio:group>OneSecGrp_SectionRef_4</bio:group>
        </bio:parameter>
        <bio:parameter name="ghdbar" value="0.000575">
          <bio:group>OneSecGrp_SectionRef_5</bio:group>
        </bio:parameter>
        <bio:parameter name="vhalfl" value="-81">
          <bio:group>ModelViewParmSubset_14</bio:group>
        </bio:parameter>
        <bio:parameter name="vhalfl" value="-73">
          <bio:group>ModelViewParmSubset_15</bio:group>
        </bio:parameter>
      </bio:mechanism>
      <bio:mechanism name="kad" type="Channel Mechanism">
        <bio:parameter name="gkabar" value="0">
          <bio:group>ModelViewParmSubset_16</bio:group>
        </bio:parameter>
        <bio:parameter name="gkabar" value="0.1035">
          <bio:group>OneSecGrp_SectionRef_4</bio:group>
        </bio:parameter>
        <bio:parameter name="gkabar" value="0.135">
          <bio:group>OneSecGrp_SectionRef_5</bio:group>
        </bio:parameter>
      </bio:mechanism>
      <bio:mechanism name="kap" type="Channel Mechanism">
        <bio:parameter name="gkabar" value="0">
          <bio:group>ModelViewParmSubset_14</bio:group>
        </bio:parameter>
        <bio:parameter name="gkabar" value="0.03">
          <bio:group>OneSecGrp_SectionRef_1</bio:group>
        </bio:parameter>
        <bio:parameter name="gkabar" value="0.0585">
          <bio:group>OneSecGrp_SectionRef_3</bio:group>
        </bio:parameter>
        <bio:parameter name="gkabar" value="0.06">
          <bio:group>OneSecGrp_SectionRef_2</bio:group>
        </bio:parameter>
      </bio:mechanism>
      <bio:mechanism name="kdr" type="Channel Mechanism">
        <bio:parameter name="gkdrbar" value="0.01">
          <bio:group>all</bio:group>
        </bio:parameter>
      </bio:mechanism>
      <bio:mechanism name="na3" type="Channel Mechanism">
        <bio:parameter name="sh" value="0">
          <bio:group>all</bio:group>
        </bio:parameter>
        <bio:parameter name="gbar" value="0.015">
          <bio:group>ModelViewParmSubset_13</bio:group>
        </bio:parameter>
        <bio:parameter name="gbar" value="0.025">
          <bio:group>OneSecGrp_SectionRef_1</bio:group>
        </bio:parameter>
        <bio:parameter name="ar" value="0.5">
          <bio:group>OneSecGrp_SectionRef_5</bio:group>
        </bio:parameter>
        <bio:parameter name="ar" value="0.65">
          <bio:group>OneSecGrp_SectionRef_4</bio:group>
        </bio:parameter>
        <bio:parameter name="ar" value="0.857143">
          <bio:group>OneSecGrp_SectionRef_2</bio:group>
        </bio:parameter>
        <bio:parameter name="ar" value="0.864286">
          <bio:group>OneSecGrp_SectionRef_3</bio:group>
        </bio:parameter>
        <bio:parameter name="ar" value="1">
          <bio:group>OneSecGrp_SectionRef_1</bio:group>
        </bio:parameter>
      </bio:mechanism>
      <bio:spec_capacitance>
        <bio:parameter value="1">
          <bio:group>all</bio:group>
        </bio:parameter>
      </bio:spec_capacitance>
      <bio:spec_axial_resistance>
        <bio:parameter value="0.15">
          <bio:group>all</bio:group>
        </bio:parameter>
      </bio:spec_axial_resistance>
    </biophysics>
  </cell>
</cells>
  <mechanism name="PT1dStim">
    <parameter name="start" value="500"/>
    <parameter name="nrepeat" value="1"/>
    <parameter name="delay" value="1000"/>
    <parameter name="noise" value="1"/>
    <parameter name="maxfr" value="8"/>
    <parameter name="thfreq" value="5"/>
    <parameter name="thphase" value="0"/>
    <parameter name="thamp" value="1"/>
    <parameter name="plx0" value="97.5067"/>
    <parameter name="plx0" value="99.2371"/>
    <parameter name="plx0" value="99.361"/>
    <parameter name="plx0" value="99.875"/>
    <parameter name="plx0" value="101.555"/>
    <parameter name="plx0" value="101.822"/>
    <parameter name="plx0" value="102.364"/>
    <parameter name="plx0" value="102.525"/>
    <parameter name="plx0" value="102.941"/>
    <parameter name="plx0" value="103.05"/>
    <parameter name="plsig" value="6.45241"/>
    <parameter name="plsig" value="7.00811"/>
    <parameter name="plsig" value="7.91396"/>
    <parameter name="plsig" value="8.43208"/>
    <parameter name="plsig" value="8.80469"/>
    <parameter name="plsig" value="9.30319"/>
    <parameter name="plsig" value="10.4531"/>
    <parameter name="plsig" value="10.4803"/>
    <parameter name="plsig" value="11.5996"/>
    <parameter name="plsig" value="13.1833"/>
    <parameter name="speed" value="40"/>
    <parameter name="maxdist" value="200"/>
  </mechanism>
  <mechanism name="BurstStim2">
    <parameter name="interval" value="200"/>
    <parameter name="number" value="10000"/>
    <parameter name="start" value="2500"/>
    <parameter name="noise" value="0"/>
    <parameter name="burstint" value="5000"/>
    <parameter name="burstlen" value="1000"/>
  </mechanism>
</neuroml>
